*HEADING
Shell bracket demo (public textbook benchmark, S4 shells), mm-t-s-MPa

*NODE
1, 0.000, -20.000, 0.0
2, 5.000, -20.000, 0.0
3, 10.000, -20.000, 0.0
4, 15.000, -20.000, 0.0
5, 20.000, -20.000, 0.0
6, 25.000, -20.000, 0.0
7, 30.000, -20.000, 0.0
8, 35.000, -20.000, 0.0
9, 40.000, -20.000, 0.0
10, 45.000, -20.000, 0.0
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*ELEMENT, TYPE=S4, ELSET=PLATE
1, 1, 2, 27, 26
2, 2, 3, 28, 27
3, 3, 4, 29, 28
4, 4, 5, 30, 29
5, 5, 6, 31, 30
6, 6, 7, 32, 31
7, 7, 8, 33, 32
8, 8, 9, 34, 33
9, 9, 10, 35, 34
10, 10, 11, 36, 35
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*NSET, NSET=ROOT
1, 26, 51, 76, 101, 126, 151, 176, 201
*NSET, NSET=TIP
25, 50, 75, 100, 125, 150, 175, 200, 225
*NSET, NSET=NALL, GENERATE
1, 225, 1
*MATERIAL, NAME=STEEL
*ELASTIC
210000.0, 0.3
*DENSITY
7.85e-09,
*SHELL SECTION, ELSET=PLATE, MATERIAL=STEEL
5.000,
*BOUNDARY
ROOT, 1, 6
*STEP
*STATIC
*CLOAD
TIP, 3, -10.0
*NODE PRINT, NSET=NALL
U
*EL PRINT, ELSET=PLATE
S
*NODE FILE
U
*EL FILE
S
*END STEP
