*HEADING
Cantilever beam demo (public textbook benchmark, C3D8 solids), mm-t-s-MPa

*NODE
1, 0.000, -4.000, -4.000
2, 5.000, -4.000, -4.000
3, 10.000, -4.000, -4.000
4, 15.000, -4.000, -4.000
5, 20.000, -4.000, -4.000
6, 25.000, -4.000, -4.000
7, 30.000, -4.000, -4.000
8, 35.000, -4.000, -4.000
9, 40.000, -4.000, -4.000
10, 45.000, -4.000, -4.000
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*ELEMENT, TYPE=C3D8, ELSET=BEAM
1, 1, 2, 27, 26, 126, 127, 152, 151
2, 2, 3, 28, 27, 127, 128, 153, 152
3, 3, 4, 29, 28, 128, 129, 154, 153
4, 4, 5, 30, 29, 129, 130, 155, 154
5, 5, 6, 31, 30, 130, 131, 156, 155
6, 6, 7, 32, 31, 131, 132, 157, 156
7, 7, 8, 33, 32, 132, 133, 158, 157
8, 8, 9, 34, 33, 133, 134, 159, 158
9, 9, 10, 35, 34, 134, 135, 160, 159
10, 10, 11, 36, 35, 135, 136, 161, 160
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*NSET, NSET=ROOT
1, 26, 51, 76, 101, 126, 151, 176
201, 226, 251, 276, 301, 326, 351, 376
401, 426, 451, 476, 501, 526, 551, 576
601
*NSET, NSET=TIP
25, 50, 75, 100, 125, 150, 175, 200
225, 250, 275, 300, 325, 350, 375, 400
425, 450, 475, 500, 525, 550, 575, 600
625
*NSET, NSET=NALL, GENERATE
1, 625, 1
*MATERIAL, NAME=STEEL
*ELASTIC
210000.0, 0.3
*DENSITY
7.85e-09,
*SOLID SECTION, ELSET=BEAM, MATERIAL=STEEL,
*BOUNDARY
ROOT, 1, 6
*STEP
*STATIC
*CLOAD
TIP, 3, -4.0
*NODE PRINT, NSET=NALL
U
*EL PRINT, ELSET=BEAM
S
*NODE FILE
U
*EL FILE
S
*END STEP
