*HEADING
Shell cantilever modal demo (public textbook benchmark, S4 shells), mm-t-s-MPa

*NODE
1, 0.000, -30.000, 0.0
2, 10.000, -30.000, 0.0
3, 20.000, -30.000, 0.0
4, 30.000, -30.000, 0.0
5, 40.000, -30.000, 0.0
6, 50.000, -30.000, 0.0
7, 60.000, -30.000, 0.0
8, 70.000, -30.000, 0.0
9, 80.000, -30.000, 0.0
10, 90.000, -30.000, 0.0
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*ELEMENT, TYPE=S4, ELSET=PLATE
1, 1, 2, 33, 32
2, 2, 3, 34, 33
3, 3, 4, 35, 34
4, 4, 5, 36, 35
5, 5, 6, 37, 36
6, 6, 7, 38, 37
7, 7, 8, 39, 38
8, 8, 9, 40, 39
9, 9, 10, 41, 40
10, 10, 11, 42, 41
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*NSET, NSET=ROOT
1, 32, 63, 94, 125, 156, 187
*NSET, NSET=NALL, GENERATE
1, 217, 1
*MATERIAL, NAME=STEEL
*ELASTIC
210000.0, 0.3
*DENSITY
7.85e-09,
*SHELL SECTION, ELSET=PLATE, MATERIAL=STEEL
4.000,
*BOUNDARY
ROOT, 1, 6
*STEP
*FREQUENCY
5
*NODE PRINT, NSET=NALL
U
*NODE FILE
U
*END STEP
